<?xml version="1.0"?>
<?xml-stylesheet type="text/xsl" href="http://jsbsim.sourceforge.net/JSBSim.xsl"?>
<fdm_config name="KingAir-350ER" version="2.0" release="BETA"
   xmlns:xsi="http://www.w3.org/2001/XMLSchema-instance"
   xsi:noNamespaceSchemaLocation="http://jsbsim.sourceforge.net/JSBSim.xsd">

  <fileheader>
    <author> Rebuilt 2026 for the FlightGear KingAir-350 package (JSBSim) </author>
    <filecreationdate> 2026-09-24 </filecreationdate>
    <version> 2.0 </version>
    <description>
      Beechcraft King Air 350ER (B300 Extended Range: MTOW 16500 lb, MLW 15675 lb, MZFW 13000 lb, 775 US gal in enlarged nacelle tanks, reinforced landing gear). Twin PT6A-60A, Hartzell 4-blade 105 in propellers.
      Structural frame: origin at the 3D model origin, x positive aft, y right, z up, inches.
      Wing: S = 310 ft2, b = 57.92 ft, MAC = 5.83 ft (70 in), MAC leading edge at x = -118.1 in,
      dihedral 6 deg, aspect ratio 10.8, NASA winglets. T-tail: 68 ft2, 17 deg sweep; fin 52.3 ft2.
      Aerodynamic reference point at 25 % MAC. CG envelope: 7.8 % (to 11800 lb) / 19.3 % (15000 lb) fwd, 31.7 % aft.
      Weights: BEW ~ 10150 lb here (payload dialog adds crew/pax/baggage).
      Fuel: 2 x 308.5 gal main + 2 x 79.5 gal aux (aux transfers first).
      Sources: Beechcraft King Air 350i Specification and Description, TCDS A24CE, operator limitation
      sheets (Vmo 263 KIAS / M 0.58, Vfe 202/158, Vle 184, Vs 96 / Vso 81 KCAS at 15000 lb, Vmca 94),
      published performance (ROC 2731 fpm, 312 KTAS max cruise FL240, 1572 nm), ICAS 2002 paper 783 (flight test envelope).
    </description>
  </fileheader>

  <metrics>
    <wingarea  unit="FT2"> 310.0 </wingarea>
    <wingspan  unit="FT" > 57.92 </wingspan>
    <wing_incidence unit="DEG"> 3.5 </wing_incidence>
    <chord     unit="FT" > 5.83 </chord>
    <htailarea unit="FT2"> 68.0 </htailarea>
    <htailarm  unit="FT" > 25.9 </htailarm>
    <vtailarea unit="FT2"> 52.3 </vtailarea>
    <vtailarm  unit="FT" > 24.4 </vtailarm>
    <location name="AERORP" unit="IN"> <x> -100.6 </x> <y> 0.0 </y> <z> -15.7 </z> </location>
    <location name="EYEPOINT" unit="IN"> <x> -157.5 </x> <y> -14.7 </y> <z> 22.0 </z> </location>
    <location name="VRP" unit="IN"> <x> 0.0 </x> <y> 0.0 </y> <z> 0.0 </z> </location>
  </metrics>

  <mass_balance>
    <ixx unit="SLUG*FT2"> 21300 </ixx>
    <iyy unit="SLUG*FT2"> 20400 </iyy>
    <izz unit="SLUG*FT2"> 39200 </izz>
    <ixz unit="SLUG*FT2"> 800 </ixz>
    <emptywt unit="LBS"> 10150 </emptywt>
    <location name="CG" unit="IN"> <x> -103.1 </x> <y> 0.0 </y> <z> -4.7 </z> </location>
    <pointmass name="Pilot">
      <weight unit="LBS"> 190.0 </weight>
      <location name="POINTMASS" unit="IN"> <x> -157.5 </x> <y> -14.7 </y> <z> 0.0 </z> </location>
    </pointmass>
    <pointmass name="Copilot">
      <weight unit="LBS"> 0.0 </weight>
      <location name="POINTMASS" unit="IN"> <x> -157.5 </x> <y> 14.7 </y> <z> 0.0 </z> </location>
    </pointmass>
    <pointmass name="Passengers">
      <weight unit="LBS"> 680.0 </weight>
      <location name="POINTMASS" unit="IN"> <x> -93.0 </x> <y> 0.0 </y> <z> 0.0 </z> </location>
    </pointmass>
    <pointmass name="Baggage">
      <weight unit="LBS"> 100.0 </weight>
      <location name="POINTMASS" unit="IN"> <x> 55.0 </x> <y> 0.0 </y> <z> -5.0 </z> </location>
    </pointmass>
  </mass_balance>

  <ground_reactions>
    <contact type="BOGEY" name="NOSE">
      <location unit="IN"> <x> -261.4 </x> <y> 0.0 </y> <z> -74.0 </z> </location>
      <static_friction> 0.80 </static_friction>
      <dynamic_friction> 0.50 </dynamic_friction>
      <rolling_friction> 0.02 </rolling_friction>
      <spring_coeff unit="LBS/FT"> 13500 </spring_coeff>
      <damping_coeff unit="LBS/FT/SEC"> 2000 </damping_coeff>
      <damping_coeff_rebound unit="LBS/FT/SEC"> 600 </damping_coeff_rebound>
      <max_steer unit="DEG"> 48 </max_steer>
      <brake_group> NONE </brake_group>
      <retractable> 1 </retractable>
    </contact>
    <contact type="BOGEY" name="LEFT_MAIN">
      <location unit="IN"> <x> -76.0 </x> <y> -109.1 </y> <z> -75.6 </z> </location>
      <static_friction> 0.80 </static_friction>
      <dynamic_friction> 0.50 </dynamic_friction>
      <rolling_friction> 0.02 </rolling_friction>
      <spring_coeff unit="LBS/FT"> 23000 </spring_coeff>
      <damping_coeff unit="LBS/FT/SEC"> 3300 </damping_coeff>
      <damping_coeff_rebound unit="LBS/FT/SEC"> 1200 </damping_coeff_rebound>
      <max_steer unit="DEG"> 0.0 </max_steer>
      <brake_group> LEFT </brake_group>
      <retractable> 1 </retractable>
    </contact>
    <contact type="BOGEY" name="RIGHT_MAIN">
      <location unit="IN"> <x> -76.0 </x> <y> 109.1 </y> <z> -75.6 </z> </location>
      <static_friction> 0.80 </static_friction>
      <dynamic_friction> 0.50 </dynamic_friction>
      <rolling_friction> 0.02 </rolling_friction>
      <spring_coeff unit="LBS/FT"> 23000 </spring_coeff>
      <damping_coeff unit="LBS/FT/SEC"> 3300 </damping_coeff>
      <damping_coeff_rebound unit="LBS/FT/SEC"> 1200 </damping_coeff_rebound>
      <max_steer unit="DEG"> 0.0 </max_steer>
      <brake_group> RIGHT </brake_group>
      <retractable> 1 </retractable>
    </contact>
    <contact type="STRUCTURE" name="LEFT_WINGTIP">
      <location unit="IN"> <x> -86.0 </x> <y> -346.0 </y> <z> -12.0 </z> </location>
      <static_friction> 0.8 </static_friction> <dynamic_friction> 0.6 </dynamic_friction>
      <spring_coeff unit="LBS/FT"> 40000 </spring_coeff> <damping_coeff unit="LBS/FT/SEC"> 4000 </damping_coeff>
    </contact>
    <contact type="STRUCTURE" name="RIGHT_WINGTIP">
      <location unit="IN"> <x> -86.0 </x> <y> 346.0 </y> <z> -12.0 </z> </location>
      <static_friction> 0.8 </static_friction> <dynamic_friction> 0.6 </dynamic_friction>
      <spring_coeff unit="LBS/FT"> 40000 </spring_coeff> <damping_coeff unit="LBS/FT/SEC"> 4000 </damping_coeff>
    </contact>
    <contact type="STRUCTURE" name="TAIL_SKID">
      <location unit="IN"> <x> 255.0 </x> <y> 0.0 </y> <z> -30.0 </z> </location>
      <static_friction> 0.8 </static_friction> <dynamic_friction> 0.6 </dynamic_friction>
      <spring_coeff unit="LBS/FT"> 40000 </spring_coeff> <damping_coeff unit="LBS/FT/SEC"> 4000 </damping_coeff>
    </contact>
    <contact type="STRUCTURE" name="NOSE_CONE">
      <location unit="IN"> <x> -277.0 </x> <y> 0.0 </y> <z> -10.0 </z> </location>
      <static_friction> 0.8 </static_friction> <dynamic_friction> 0.6 </dynamic_friction>
      <spring_coeff unit="LBS/FT"> 40000 </spring_coeff> <damping_coeff unit="LBS/FT/SEC"> 4000 </damping_coeff>
    </contact>
  </ground_reactions>

  <propulsion>
    <engine file="PT6A-60A">
      <location unit="IN"> <x> -173.2 </x> <y> -109.1 </y> <z> -7.1 </z> </location>
      <orient unit="DEG"> <pitch> 0.0 </pitch> <roll> 0.0 </roll> <yaw> 0.0 </yaw> </orient>
      <feed> 0 </feed>
      <feed> 1 </feed>
      <thruster file="Hartzell-4B-105">
        <location unit="IN"> <x> -215.0 </x> <y> -109.1 </y> <z> -7.1 </z> </location>
        <orient unit="DEG"> <pitch> 0.0 </pitch> <roll> 0.0 </roll> <yaw> 0.0 </yaw> </orient>
        <sense> 1 </sense>
      </thruster>
    </engine>
    <engine file="PT6A-60A">
      <location unit="IN"> <x> -173.2 </x> <y> 109.1 </y> <z> -7.1 </z> </location>
      <orient unit="DEG"> <pitch> 0.0 </pitch> <roll> 0.0 </roll> <yaw> 0.0 </yaw> </orient>
      <feed> 2 </feed>
      <feed> 3 </feed>
      <thruster file="Hartzell-4B-105">
        <location unit="IN"> <x> -215.0 </x> <y> 109.1 </y> <z> -7.1 </z> </location>
        <orient unit="DEG"> <pitch> 0.0 </pitch> <roll> 0.0 </roll> <yaw> 0.0 </yaw> </orient>
        <sense> 1 </sense>
      </thruster>
    </engine>

    <tank type="FUEL" number="0">  <!-- L aux: 79.5 US gal usable -->
      <location unit="IN"><x>-97.8</x><y>-59.1</y><z>-19.7</z></location>
      <capacity unit="LBS"> 532.6 </capacity>
      <contents unit="LBS"> 426.1 </contents>
      <priority> 1 </priority>
      <density unit="LBS/GAL"> 6.7 </density>
    </tank>
    <tank type="FUEL" number="1">  <!-- L main: 308.5 US gal usable -->
      <location unit="IN"><x>-97.8</x><y>-133.9</y><z>-17.7</z></location>
      <capacity unit="LBS"> 2067.0 </capacity>
      <contents unit="LBS"> 1653.6 </contents>
      <priority> 2 </priority>
      <density unit="LBS/GAL"> 6.7 </density>
    </tank>
    <tank type="FUEL" number="2">  <!-- R main: 308.5 US gal usable -->
      <location unit="IN"><x>-97.8</x><y>133.9</y><z>-17.7</z></location>
      <capacity unit="LBS"> 2067.0 </capacity>
      <contents unit="LBS"> 1653.6 </contents>
      <priority> 2 </priority>
      <density unit="LBS/GAL"> 6.7 </density>
    </tank>
    <tank type="FUEL" number="3">  <!-- R aux: 79.5 US gal usable -->
      <location unit="IN"><x>-97.8</x><y>59.1</y><z>-19.7</z></location>
      <capacity unit="LBS"> 532.6 </capacity>
      <contents unit="LBS"> 426.1 </contents>
      <priority> 1 </priority>
      <density unit="LBS/GAL"> 6.7 </density>
    </tank>
  </propulsion>

  <system file="engine-control"/>
  <system file="fuel-system"/>
  <system file="nws"/>
  <system file="autopilot"/>

  <flight_control name="FCS: KingAir-350">
    <property value="1"> /controls/flight/yaw-damper </property>
    <property value="1"> /controls/flight/rudder-boost </property>

    <channel name="Pitch">
      <!-- Elevator: 20 deg up (nose up, cmd -1) / 14 deg down (cmd +1). Trim (tab) adds to the command. -->
      <summer name="fcs/pitch-cmd-sum">
        <input> fcs/elevator-cmd-norm </input>
        <input> fcs/pitch-trim-cmd-norm </input>
        <input> ap/elevator-cmd </input>
        <clipto> <min> -1 </min> <max> 1 </max> </clipto>
      </summer>
      <aerosurface_scale name="fcs/elevator-control">
        <input> fcs/pitch-cmd-sum </input>
        <domain> <min> -1 </min> <max> 1 </max> </domain>
        <range> <min> -0.3491 </min> <max> 0.2443 </max> </range>
        <output> fcs/elevator-pos-rad </output>
      </aerosurface_scale>
      <aerosurface_scale name="fcs/elevator-normalization">
        <input> fcs/elevator-pos-rad </input>
        <domain> <min> -0.3491 </min> <max> 0.2443 </max> </domain>
        <range> <min> -1 </min> <max> 1 </max> </range>
        <output> fcs/elevator-pos-norm </output>
      </aerosurface_scale>
    </channel>

    <channel name="Roll">
      <!-- Ailerons: 25 deg up / 15 deg down, differential. Positive cmd = right roll. -->
      <summer name="fcs/roll-cmd-sum">
        <input> fcs/aileron-cmd-norm </input>
        <input> fcs/roll-trim-cmd-norm </input>
        <input> ap/aileron-cmd </input>
        <clipto> <min> -1 </min> <max> 1 </max> </clipto>
      </summer>
      <aerosurface_scale name="fcs/left-aileron-control">
        <input> fcs/roll-cmd-sum </input>
        <domain> <min> -1 </min> <max> 1 </max> </domain>
        <range> <min> -0.4363 </min> <max> 0.2618 </max> </range>
        <output> fcs/left-aileron-pos-rad </output>
      </aerosurface_scale>
      <pure_gain name="fcs/right-aileron-cmd">
        <input> fcs/roll-cmd-sum </input>
        <gain> -1.0 </gain>
      </pure_gain>
      <aerosurface_scale name="fcs/right-aileron-control">
        <input> fcs/right-aileron-cmd </input>
        <domain> <min> -1 </min> <max> 1 </max> </domain>
        <range> <min> -0.4363 </min> <max> 0.2618 </max> </range>
        <output> fcs/right-aileron-pos-rad </output>
      </aerosurface_scale>
      <!-- effective (average) aileron deflection for the aero model, positive = right roll -->
      <summer name="fcs/aileron-diff-rad">
        <input> fcs/left-aileron-pos-rad </input>
        <input> -fcs/right-aileron-pos-rad </input>
      </summer>
      <pure_gain name="fcs/aileron-eff-rad">
        <input> fcs/aileron-diff-rad </input>
        <gain> 0.5 </gain>
      </pure_gain>
      <aerosurface_scale name="fcs/left-aileron-normalization">
        <input> fcs/left-aileron-pos-rad </input>
        <domain> <min> -0.4363 </min> <max> 0.2618 </max> </domain>
        <range> <min> -1 </min> <max> 1 </max> </range>
        <output> fcs/left-aileron-pos-norm </output>
      </aerosurface_scale>
      <aerosurface_scale name="fcs/right-aileron-normalization">
        <input> fcs/right-aileron-pos-rad </input>
        <domain> <min> -0.4363 </min> <max> 0.2618 </max> </domain>
        <range> <min> -1 </min> <max> 1 </max> </range>
        <output> fcs/right-aileron-pos-norm </output>
      </aerosurface_scale>
    </channel>

    <channel name="Yaw">
      <!-- Yaw damper: washed-out yaw rate feedback (required above 5000 ft on the real aircraft) -->
      <washout_filter name="fcs/yaw-rate-washout">
        <input> velocities/r-aero-rad_sec </input>
        <c1> 0.5 </c1>
      </washout_filter>
      <pure_gain name="fcs/yaw-damper-gain">
        <input> fcs/yaw-rate-washout </input>
        <gain> 2.2 </gain>
        <clipto> <min> -0.35 </min> <max> 0.35 </max> </clipto>
      </pure_gain>
      <switch name="fcs/yaw-damper-cmd">
        <default value="0.0"/>
        <test value="fcs/yaw-damper-gain"> /controls/flight/yaw-damper == 1 </test>
      </switch>
      <!-- Rudder boost: pneumatic assist proportional to the torque differential (armed by switch) -->
      <fcs_function name="fcs/torque-diff">
        <function>
          <difference>
            <abs><property> propulsion/engine[0]/propeller-torque-ftlb </property></abs>
            <abs><property> propulsion/engine[1]/propeller-torque-ftlb </property></abs>
          </difference>
        </function>
      </fcs_function>
      <fcs_function name="fcs/rudder-boost-raw">
        <function>
          <product>
            <value> 0.00035 </value>
            <property> fcs/torque-diff </property>
          </product>
        </function>
        <clipto> <min> -0.45 </min> <max> 0.45 </max> </clipto>
      </fcs_function>
      <switch name="fcs/rudder-boost-cmd">
        <default value="0.0"/>
        <test value="fcs/rudder-boost-raw"> /controls/flight/rudder-boost == 1 </test>
      </switch>
      <lag_filter name="fcs/rudder-boost-lag">
        <input> fcs/rudder-boost-cmd </input>
        <c1> 2.0 </c1>
      </lag_filter>
      <summer name="fcs/rudder-cmd-sum">
        <input> fcs/rudder-cmd-norm </input>
        <input> fcs/yaw-trim-cmd-norm </input>
        <input> fcs/yaw-damper-cmd </input>
        <input> fcs/rudder-boost-lag </input>
        <clipto> <min> -1 </min> <max> 1 </max> </clipto>
      </summer>
      <aerosurface_scale name="fcs/rudder-control">
        <input> fcs/rudder-cmd-sum </input>
        <domain> <min> -1 </min> <max> 1 </max> </domain>
        <range> <min> -0.4363 </min> <max> 0.4363 </max> </range>
        <output> fcs/rudder-pos-rad </output>
      </aerosurface_scale>
      <aerosurface_scale name="fcs/rudder-normalization">
        <input> fcs/rudder-pos-rad </input>
        <domain> <min> -0.4363 </min> <max> 0.4363 </max> </domain>
        <range> <min> -1 </min> <max> 1 </max> </range>
        <output> fcs/rudder-pos-norm </output>
      </aerosurface_scale>
    </channel>

    <channel name="Flaps">
      <!-- UP / APPROACH (14 deg) / DOWN (35 deg). About 12 s full travel. -->
      <kinematic name="fcs/flaps-control">
        <input> fcs/flap-cmd-norm </input>
        <traverse>
          <setting> <position> 0 </position> <time> 0 </time> </setting>
          <setting> <position> 14 </position> <time> 5 </time> </setting>
          <setting> <position> 35 </position> <time> 7 </time> </setting>
        </traverse>
        <output> fcs/flap-pos-deg </output>
      </kinematic>
      <aerosurface_scale name="fcs/flap-normalization">
        <input> fcs/flap-pos-deg </input>
        <domain> <min> 0 </min> <max> 35 </max> </domain>
        <range> <min> 0 </min> <max> 1 </max> </range>
        <output> fcs/flap-pos-norm </output>
      </aerosurface_scale>
    </channel>

    <channel name="Landing Gear">
      <kinematic name="fcs/gear-control">
        <input> gear/gear-cmd-norm </input>
        <traverse>
          <setting> <position> 0 </position> <time> 0 </time> </setting>
          <setting> <position> 1 </position> <time> 6 </time> </setting>
        </traverse>
        <output> gear/gear-pos-norm </output>
      </kinematic>
    </channel>

  </flight_control>

  <aerodynamics>

    <!-- ground effect on lift and induced drag, h/b of the wing -->
    <function name="aero/function/kCLge">
      <table>
        <independentVar lookup="row"> aero/h_b-mac-ft </independentVar>
        <tableData>
          0.00  1.15
          0.10  1.10
          0.20  1.06
          0.40  1.02
          1.00  1.00
        </tableData>
      </table>
    </function>
    <function name="aero/function/kCDge">
      <table>
        <independentVar lookup="row"> aero/h_b-mac-ft </independentVar>
        <tableData>
          0.00  0.55
          0.10  0.70
          0.20  0.85
          0.40  0.95
          1.00  1.00
        </tableData>
      </table>
    </function>
    <!-- basic lift coefficient (alpha, flaps) -->
    <function name="aero/coefficient/CL-basic">
      <table>
        <independentVar lookup="row">aero/alpha-rad</independentVar>
        <independentVar lookup="column">fcs/flap-pos-deg</independentVar>
        <tableData>
                      0.0     14.0     35.0
           -0.2094  -0.7800  -0.4500  -0.0800
           -0.1396  -0.4000  -0.0700   0.3000
           -0.0698  -0.0200   0.3200   0.7000
            0.0000   0.3500   0.7000   1.0800
            0.0349   0.5400   0.8900   1.2700
            0.0698   0.7300   1.0800   1.4600
            0.1047   0.9200   1.2700   1.6400
            0.1396   1.1000   1.4500   1.8200
            0.1745   1.2700   1.6200   1.9800
            0.2094   1.4200   1.7600   2.1200
            0.2269   1.4800   1.8200   2.1800
            0.2443   1.5300   1.8500   2.1600
            0.2618   1.5500   1.8300   2.1000
            0.2793   1.5400   1.7600   2.0000
            0.2967   1.4800   1.6600   1.8800
            0.3142   1.3800   1.5500   1.7500
            0.3491   1.2000   1.3500   1.5000
            0.4363   1.0000   1.1000   1.2000
            0.5236   0.9000   0.9500   1.0000
            0.6981   0.8500   0.8800   0.9000
            1.0472   0.5500   0.5500   0.5500
            1.5708   0.0000   0.0000   0.0000
        </tableData>
      </table>
    </function>
    <function name="aero/coefficient/CD-basic">
      <table>
        <independentVar lookup="row">aero/alpha-rad</independentVar>
        <independentVar lookup="column">fcs/flap-pos-deg</independentVar>
        <tableData>
                      0.0     14.0     35.0
           -0.2094   0.1098   0.1194   0.1720
           -0.1396   0.0439   0.0554   0.1089
           -0.0698   0.0304   0.0441   0.0994
            0.0000   0.0293   0.0461   0.1045
            0.0349   0.0333   0.0519   0.1121
            0.0698   0.0405   0.0610   0.1232
            0.1047   0.0507   0.0733   0.1369
            0.1396   0.0633   0.0879   0.1536
            0.1745   0.0778   0.1043   0.1711
            0.2094   0.0927   0.1198   0.1883
            0.2269   0.0992   0.1269   0.1963
            0.2443   0.1048   0.1307   0.2060
            0.2618   0.1071   0.1406   0.2114
            0.2793   0.1184   0.1454   0.2130
            0.2967   0.1248   0.1482   0.2143
            0.3142   0.1281   0.1516   0.2167
            0.3491   0.1416   0.1658   0.2296
            0.4363   0.2160   0.2425   0.3105
            0.5236   0.3195   0.3488   0.4219
            0.6981   0.5966   0.6339   0.7160
            1.0472   1.3836   1.4421   1.5488
            1.5708   1.6000   1.6000   1.6000
        </tableData>
      </table>
    </function>

    <axis name="LIFT">
      <function name="aero/force/Lift_basic">
        <description> Lift due to alpha and flaps (with ground effect) </description>
        <product>
          <property> aero/qbar-psf </property>
          <property> metrics/Sw-sqft </property>
          <property> aero/function/kCLge </property>
          <property> aero/coefficient/CL-basic </property>
        </product>
      </function>
      <function name="aero/force/Lift_elevator">
        <description> Lift due to elevator deflection </description>
        <product>
          <property> aero/qbar-psf </property>
          <property> metrics/Sw-sqft </property>
          <property> fcs/elevator-pos-rad </property>
          <value> 0.40 </value>
        </product>
      </function>
      <function name="aero/force/Lift_pitchrate">
        <description> Lift due to pitch rate </description>
        <product>
          <property> aero/qbar-psf </property>
          <property> metrics/Sw-sqft </property>
          <property> aero/ci2vel </property>
          <property> velocities/q-aero-rad_sec </property>
          <value> 7.0 </value>
        </product>
      </function>
      <function name="aero/force/Lift_alphadot">
        <description> Lift due to alpha rate </description>
        <product>
          <property> aero/qbar-psf </property>
          <property> metrics/Sw-sqft </property>
          <property> aero/ci2vel </property>
          <property> aero/alphadot-rad_sec </property>
          <value> 2.0 </value>
        </product>
      </function>
    </axis>

    <axis name="DRAG">
      <function name="aero/force/Drag_basic">
        <description> Profile + induced drag (alpha, flaps), induced part reduced in ground effect </description>
        <product>
          <property> aero/qbar-psf </property>
          <property> metrics/Sw-sqft </property>
          <sum>
            <value> 0.0275 </value>
            <product>
              <property> aero/function/kCDge </property>
              <difference> <property> aero/coefficient/CD-basic </property> <value> 0.0275 </value> </difference>
            </product>
          </sum>
        </product>
      </function>
      <function name="aero/force/Drag_gear">
        <description> Landing gear drag </description>
        <product>
          <property> aero/qbar-psf </property>
          <property> metrics/Sw-sqft </property>
          <property> gear/gear-pos-norm </property>
          <value> 0.021 </value>
        </product>
      </function>
      <function name="aero/force/Drag_beta">
        <description> Drag due to sideslip </description>
        <product>
          <property> aero/qbar-psf </property>
          <property> metrics/Sw-sqft </property>
          <table>
            <independentVar lookup="row"> aero/beta-rad </independentVar>
            <tableData>
              -1.57   0.90
              -0.52   0.20
              -0.26   0.05
               0.00   0.00
               0.26   0.05
               0.52   0.20
               1.57   0.90
            </tableData>
          </table>
        </product>
      </function>
      <function name="aero/force/Drag_elevator">
        <description> Drag due to elevator deflection </description>
        <product>
          <property> aero/qbar-psf </property>
          <property> metrics/Sw-sqft </property>
          <abs> <property> fcs/elevator-pos-rad </property> </abs>
          <value> 0.035 </value>
        </product>
      </function>
      <function name="aero/force/Drag_feathered">
        <description> Drag of feathered propellers (blades edge-on, nacelle flow) </description>
        <product>
          <property> aero/qbar-psf </property>
          <property> metrics/Sw-sqft </property>
          <value> 0.003 </value>
          <sum> <property> fcs/feather-pos-norm[0] </property> <property> fcs/feather-pos-norm[1] </property> </sum>
        </product>
      </function>
      <function name="aero/force/Drag_rudder">
        <description> Drag due to rudder deflection </description>
        <product>
          <property> aero/qbar-psf </property>
          <property> metrics/Sw-sqft </property>
          <abs> <property> fcs/rudder-pos-rad </property> </abs>
          <value> 0.030 </value>
        </product>
      </function>
      <function name="aero/force/Drag_mach">
        <description> Compressibility drag rise </description>
        <product>
          <property> aero/qbar-psf </property>
          <property> metrics/Sw-sqft </property>
          <table>
            <independentVar lookup="row"> velocities/mach </independentVar>
            <tableData>
              0.00  0.000
              0.55  0.000
              0.62  0.003
              0.70  0.012
              0.80  0.045
              1.00  0.120
            </tableData>
          </table>
        </product>
      </function>
    </axis>

    <axis name="SIDE">
      <function name="aero/force/Side_beta">
        <description> Side force due to sideslip </description>
        <product>
          <property> aero/qbar-psf </property>
          <property> metrics/Sw-sqft </property>
          <property> aero/beta-rad </property>
          <value> -0.60 </value>
        </product>
      </function>
      <function name="aero/force/Side_rudder">
        <description> Side force due to rudder </description>
        <product>
          <property> aero/qbar-psf </property>
          <property> metrics/Sw-sqft </property>
          <property> fcs/rudder-pos-rad </property>
          <value> 0.16 </value>
        </product>
      </function>
      <function name="aero/force/Side_yawrate">
        <description> Side force due to yaw rate </description>
        <product>
          <property> aero/qbar-psf </property>
          <property> metrics/Sw-sqft </property>
          <property> aero/bi2vel </property>
          <property> velocities/r-aero-rad_sec </property>
          <value> 0.30 </value>
        </product>
      </function>
    </axis>

    <axis name="ROLL">
      <function name="aero/moment/Roll_beta">
        <description> Dihedral effect (6 deg dihedral, winglets, T-tail fin) </description>
        <product>
          <property> aero/qbar-psf </property>
          <property> metrics/Sw-sqft </property>
          <property> metrics/bw-ft </property>
          <property> aero/beta-rad </property>
          <table>
            <independentVar lookup="row"> aero/alpha-rad </independentVar>
            <tableData>
              -0.10  -0.070
               0.00  -0.085
               0.10  -0.105
               0.20  -0.120
               0.35  -0.110
            </tableData>
          </table>
        </product>
      </function>
      <function name="aero/moment/Roll_damp">
        <description> Roll damping </description>
        <product>
          <property> aero/qbar-psf </property>
          <property> metrics/Sw-sqft </property>
          <property> metrics/bw-ft </property>
          <property> aero/bi2vel </property>
          <property> velocities/p-aero-rad_sec </property>
          <value> -0.50 </value>
        </product>
      </function>
      <function name="aero/moment/Roll_yaw">
        <description> Roll due to yaw rate </description>
        <product>
          <property> aero/qbar-psf </property>
          <property> metrics/Sw-sqft </property>
          <property> metrics/bw-ft </property>
          <property> aero/bi2vel </property>
          <property> velocities/r-aero-rad_sec </property>
          <sum>
            <value> 0.06 </value>
            <product> <value> 0.22 </value> <property> aero/coefficient/CL-basic </property> </product>
          </sum>
        </product>
      </function>
      <function name="aero/moment/Roll_aileron">
        <description> Roll due to ailerons (effective average deflection) </description>
        <product>
          <property> aero/qbar-psf </property>
          <property> metrics/Sw-sqft </property>
          <property> metrics/bw-ft </property>
          <property> fcs/aileron-eff-rad </property>
          <table>
            <independentVar lookup="row"> aero/alpha-rad </independentVar>
            <tableData>
              -0.10  0.100
               0.20  0.100
               0.30  0.070
               0.50  0.040
            </tableData>
          </table>
        </product>
      </function>
      <function name="aero/moment/Roll_prop_swirl">
        <description> Propeller slipstream swirl on the wing. Both propellers turn clockwise seen from behind: the
          reaction torque (propulsion moment) rolls the airframe left, while the swirl raises the lift on the left
          of each disc and lowers it on the right, rolling it right. A lifting-line estimate gives a wing moment
          of the order of the propeller torque; 85 % is taken, leaving a slight left tendency with power. </description>
        <product>
          <value> -0.85 </value>
          <sum>
            <property> propulsion/engine[0]/propeller-torque-ftlb </property>
            <property> propulsion/engine[1]/propeller-torque-ftlb </property>
          </sum>
        </product>
      </function>
      <function name="aero/moment/Roll_rudder">
        <description> Roll due to rudder (fin above CG) </description>
        <product>
          <property> aero/qbar-psf </property>
          <property> metrics/Sw-sqft </property>
          <property> metrics/bw-ft </property>
          <property> fcs/rudder-pos-rad </property>
          <value> 0.018 </value>
        </product>
      </function>
    </axis>

    <axis name="PITCH">
      <function name="aero/moment/Pitch_alpha">
        <description> Pitch moment due to alpha (static margin about 25 % MAC) plus Cm0 </description>
        <product>
          <property> aero/qbar-psf </property>
          <property> metrics/Sw-sqft </property>
          <property> metrics/cbarw-ft </property>
          <table>
            <independentVar lookup="row"> aero/alpha-rad </independentVar>
            <tableData>
              -0.35   0.320
              -0.20   0.200
               0.00   0.040
               0.10  -0.050
               0.20  -0.140
               0.26  -0.190
               0.30  -0.250
               0.35  -0.320
               0.44  -0.420
               0.52  -0.500
               0.70  -0.600
               1.57  -0.800
            </tableData>
          </table>
        </product>
      </function>
      <function name="aero/moment/Pitch_flap">
        <description> Pitch moment due to flaps </description>
        <product>
          <property> aero/qbar-psf </property>
          <property> metrics/Sw-sqft </property>
          <property> metrics/cbarw-ft </property>
          <table>
            <independentVar lookup="row"> fcs/flap-pos-deg </independentVar>
            <tableData>
               0.0   0.000
              14.0  -0.060
              35.0  -0.170
            </tableData>
          </table>
        </product>
      </function>
      <function name="aero/moment/Pitch_elevator">
        <description> Pitch moment due to elevator </description>
        <product>
          <property> aero/qbar-psf </property>
          <property> metrics/Sw-sqft </property>
          <property> metrics/cbarw-ft </property>
          <property> fcs/elevator-pos-rad </property>
          <table>
            <independentVar lookup="row"> aero/alpha-rad </independentVar>
            <tableData>
              -0.20  -1.40
               0.25  -1.40
               0.35  -1.10
               0.60  -0.70
               1.57  -0.40
            </tableData>
          </table>
        </product>
      </function>
      <function name="aero/moment/Pitch_damp">
        <description> Pitch damping (T-tail) </description>
        <product>
          <property> aero/qbar-psf </property>
          <property> metrics/Sw-sqft </property>
          <property> metrics/cbarw-ft </property>
          <property> aero/ci2vel </property>
          <property> velocities/q-aero-rad_sec </property>
          <value> -30.0 </value>
        </product>
      </function>
      <function name="aero/moment/Pitch_alphadot">
        <description> Pitch moment due to alpha rate </description>
        <product>
          <property> aero/qbar-psf </property>
          <property> metrics/Sw-sqft </property>
          <property> metrics/cbarw-ft </property>
          <property> aero/ci2vel </property>
          <property> aero/alphadot-rad_sec </property>
          <value> -9.0 </value>
        </product>
      </function>
      <function name="aero/moment/Pitch_ge">
        <description> Nose-down moment in ground effect (tail downwash change) </description>
        <product>
          <property> aero/qbar-psf </property>
          <property> metrics/Sw-sqft </property>
          <property> metrics/cbarw-ft </property>
          <difference> <property> aero/function/kCLge </property> <value> 1.0 </value> </difference>
          <value> -0.25 </value>
        </product>
      </function>
    </axis>

    <axis name="YAW">
      <function name="aero/moment/Yaw_beta">
        <description> Weathercock stability </description>
        <product>
          <property> aero/qbar-psf </property>
          <property> metrics/Sw-sqft </property>
          <property> metrics/bw-ft </property>
          <property> aero/beta-rad </property>
          <value> 0.095 </value>
        </product>
      </function>
      <function name="aero/moment/Yaw_damp">
        <description> Yaw damping </description>
        <product>
          <property> aero/qbar-psf </property>
          <property> metrics/Sw-sqft </property>
          <property> metrics/bw-ft </property>
          <property> aero/bi2vel </property>
          <property> velocities/r-aero-rad_sec </property>
          <value> -0.16 </value>
        </product>
      </function>
      <function name="aero/moment/Yaw_rollrate">
        <description> Yaw due to roll rate </description>
        <product>
          <property> aero/qbar-psf </property>
          <property> metrics/Sw-sqft </property>
          <property> metrics/bw-ft </property>
          <property> aero/bi2vel </property>
          <property> velocities/p-aero-rad_sec </property>
          <sum>
            <value> 0.01 </value>
            <product> <value> -0.08 </value> <property> aero/coefficient/CL-basic </property> </product>
          </sum>
        </product>
      </function>
      <function name="aero/moment/Yaw_rudder">
        <description> Yaw due to rudder </description>
        <product>
          <property> aero/qbar-psf </property>
          <property> metrics/Sw-sqft </property>
          <property> metrics/bw-ft </property>
          <property> fcs/rudder-pos-rad </property>
          <value> -0.095 </value>
        </product>
      </function>
      <function name="aero/moment/Yaw_aileron">
        <description> Adverse yaw </description>
        <product>
          <property> aero/qbar-psf </property>
          <property> metrics/Sw-sqft </property>
          <property> metrics/bw-ft </property>
          <property> fcs/aileron-eff-rad </property>
          <sum>
            <value> -0.004 </value>
            <product> <value> -0.012 </value> <property> aero/coefficient/CL-basic </property> </product>
          </sum>
        </product>
      </function>
    </axis>

  </aerodynamics>

  <external_reactions>
    <force name="pushback" frame="BODY">
      <location unit="IN"> <x> -261.4 </x> <y> 0.0 </y> <z> -64.0 </z> </location>
      <direction> <x> -1.0 </x> <y> 0.0 </y> <z> 0.0 </z> </direction>
    </force>
  </external_reactions>

</fdm_config>
