<?xml version="1.0"?>
<!--
  Hartzell HC-E4A-3 style 4-blade, 105 in aluminium propeller for the Beechcraft King Air 350 (PT6A-60A)
  Generated by blade-element/momentum theory (bemt2.py / gen_prop2.py), blade angle referenced at 0.75 R.
  Columns: blade angle (deg); rows: advance ratio J = V/(n D).
  minpitch  = flight-idle low pitch stop, reversepitch = max reverse, maxpitch = feather.
  Governor range 1450-1700 rpm (prop lever), gear ratio 1 (engine RPM property = propeller RPM).
-->
<propeller name="Hartzell-4B-105in">
  <ixx unit="SLUG*FT2"> 21.0 </ixx>
  <diameter unit="IN"> 105.0 </diameter>
  <numblades> 4 </numblades>
  <gearratio> 1.0 </gearratio>
  <p_factor> 6.0 </p_factor>
  <sense> 1 </sense>
  <minpitch> 7.5 </minpitch>
  <maxpitch> 87 </maxpitch>
  <reversepitch> -12 </reversepitch>
  <minrpm> 1450 </minrpm>
  <maxrpm> 1700 </maxrpm>
  <constspeed> 1 </constspeed>

  <table name="C_THRUST" type="internal">
    <tableData>
                   -15       -10        -5         0         5        10        15        20        25        30        35        40        45        50        55        60        70        80        87
       0.00      -0.1900   -0.1100   -0.0350    0.0012    0.0670    0.1244    0.1863    0.2433    0.2834    0.2810    0.2227    0.1733    0.1541    0.1444    0.1314    0.1147    0.0753    0.0421   -0.0040
       0.20      -0.1805   -0.1045   -0.0333   -0.0742    0.0318    0.0874    0.1531    0.2182    0.2735    0.3006    0.2652    0.2004    0.1661    0.1543    0.1431    0.1275    0.0867    0.0452   -0.0044
       0.40      -0.1710   -0.0990   -0.0315   -0.1644   -0.0218    0.0351    0.1025    0.1751    0.2476    0.3031    0.3105    0.2449    0.1854    0.1617    0.1511    0.1372    0.0958    0.0456   -0.0048
       0.60      -0.1615   -0.0935   -0.0298   -0.2548   -0.0911   -0.0300    0.0405    0.1171    0.1955    0.2732    0.3346    0.3121    0.2273    0.1744    0.1567    0.1443    0.1042    0.0486   -0.0052
       0.80      -0.1520   -0.0880   -0.0280   -0.2973   -0.1752   -0.1080   -0.0323    0.0500    0.1344    0.2183    0.3000    0.3671    0.3049    0.2128    0.1653    0.1499    0.1119    0.0540   -0.0056
       1.00      -0.1425   -0.0825   -0.0263   -0.3516   -0.2730   -0.1985   -0.1157   -0.0263    0.0656    0.1572    0.2464    0.3318    0.3935    0.2918    0.1998    0.1564    0.1191    0.0596   -0.0060
       1.20      -0.1330   -0.0770   -0.0245   -0.4590   -0.3845   -0.3012   -0.2099   -0.1117   -0.0110    0.0895    0.1876    0.2816    0.3702    0.3975    0.2744    0.1839    0.1264    0.0656   -0.0064
       1.40      -0.1235   -0.0715   -0.0228   -0.4288   -0.5095   -0.4163   -0.3152   -0.2070   -0.0959    0.0150    0.1233    0.2272    0.3252    0.4162    0.3783    0.2536    0.1338    0.0723   -0.0068
       1.60      -0.1140   -0.0660   -0.0210   -0.4224   -0.5079   -0.5441   -0.4323   -0.3128   -0.1900   -0.0672    0.0529    0.1682    0.2769    0.3778    0.4697    0.3493    0.1477    0.0798   -0.0072
       1.80      -0.1045   -0.0605   -0.0193   -0.4634   -0.4977   -0.5885   -0.5622   -0.4302   -0.2942   -0.1579   -0.0243    0.1040    0.2250    0.3372    0.4391    0.4690    0.1892    0.0885   -0.0076
       2.00      -0.0950   -0.0550   -0.0175   -0.5284   -0.5286   -0.5759   -0.6797   -0.5606   -0.4100   -0.2585   -0.1096    0.0337    0.1689    0.2939    0.4073    0.5079    0.2678    0.0987   -0.0080
       2.20      -0.0855   -0.0495   -0.0158   -0.5983   -0.6026   -0.5930   -0.6937   -0.7055   -0.5391   -0.3707   -0.2044   -0.0440    0.1075    0.2475    0.3740    0.4856    0.3682    0.1112   -0.0084
       2.40      -0.0760   -0.0440   -0.0140   -0.6779   -0.7020   -0.6499   -0.7166   -0.8298   -0.6844   -0.4969   -0.3108   -0.1307    0.0395    0.1969    0.3390    0.4636    0.4924    0.1501   -0.0088
       2.60      -0.0665   -0.0385   -0.0123   -0.7676   -0.8187   -0.7483   -0.7602   -0.8863   -0.8477   -0.6385   -0.4301   -0.2280   -0.0367    0.1402    0.2997    0.4396    0.6257    0.2163   -0.0092
       2.80      -0.0570   -0.0330   -0.0105   -0.8674   -0.9502   -0.8585   -0.8127   -0.9504   -1.0301   -0.7966   -0.5634   -0.3369   -0.1223    0.0762    0.2550    0.4112    0.6502    0.3101   -0.0096
       3.00      -0.0570   -0.0330   -0.0105   -0.9808   -1.0919   -0.9938   -0.8909   -0.9757   -1.1798   -0.9718   -0.7117   -0.4584   -0.2184    0.0034    0.2029    0.3769    0.6409    0.4146   -0.0100
       3.50      -0.0570   -0.0330   -0.0105   -1.3168   -1.4796   -1.3673   -1.2307   -1.1281   -1.3064   -1.4809   -1.1433   -0.8175   -0.5097   -0.2268    0.0261    0.2449    0.5733    0.6650   -0.0110
       4.00      -0.0570   -0.0330   -0.0105   -1.9693   -1.8862   -1.7638   -1.6044   -1.4425   -1.4192   -1.6477   -1.6304   -1.2462   -0.8882   -0.5597   -0.2658   -0.0106    0.3871    0.5880   -0.0120
       5.00      -0.0570   -0.0330   -0.0105   -2.6637   -2.6028   -2.5110   -2.3780   -2.2259   -2.0915   -2.0517   -2.1853   -2.3250   -1.9386   -1.5792   -1.2517   -0.9605   -0.5352   -0.3721   -0.0140
    </tableData>
  </table>

  <table name="C_POWER" type="internal">
    <tableData>
                   -15       -10        -5         0         5        10        15        20        25        30        35        40        45        50        55        60        70        80        87
       0.00       0.2000    0.1100    0.0350    0.0124    0.0229    0.0461    0.0826    0.1292    0.1793    0.2157    0.2307    0.2778    0.3460    0.3947    0.4313    0.4584    0.4773    0.4569    0.4585
       0.20       0.2080    0.1144    0.0364   -0.0063    0.0174    0.0400    0.0789    0.1303    0.1892    0.2425    0.2621    0.2828    0.3518    0.4201    0.4691    0.5097    0.5603    0.5680    0.5721
       0.40       0.2160    0.1188    0.0378   -0.0523    0.0022    0.0233    0.0633    0.1206    0.1916    0.2634    0.3093    0.3063    0.3459    0.4285    0.4940    0.5460    0.6228    0.6560    0.6632
       0.60       0.2240    0.1232    0.0392   -0.1199   -0.0288   -0.0086    0.0327    0.0940    0.1724    0.2654    0.3563    0.3745    0.3568    0.4192    0.5082    0.5724    0.6718    0.7276    0.7406
       0.80       0.2320    0.1276    0.0406   -0.1680   -0.0813   -0.0613   -0.0177    0.0489    0.1351    0.2383    0.3558    0.4704    0.4356    0.4185    0.5046    0.5932    0.7146    0.7920    0.8157
       1.00       0.2400    0.1320    0.0420   -0.2046   -0.1603   -0.1395   -0.0923   -0.0190    0.0768    0.1921    0.3241    0.4701    0.5967    0.4984    0.4974    0.6046    0.7555    0.8545    0.8913
       1.20       0.2480    0.1364    0.0434   -0.2859   -0.2698   -0.2469   -0.1949   -0.1134   -0.0062    0.1235    0.2725    0.4379    0.6166    0.7008    0.5687    0.5942    0.7968    0.9191    0.9695
       1.40       0.2560    0.1408    0.0448   -0.3098   -0.4123   -0.3863   -0.3286   -0.2376   -0.1172    0.0291    0.1979    0.3858    0.5895    0.8057    0.7704    0.6578    0.8399    0.9881    1.0534
       1.60       0.2640    0.1452    0.0462   -0.2692   -0.4672   -0.5598   -0.4960   -0.3945   -0.2594   -0.0942    0.0973    0.3112    0.5437    0.7911    1.0495    0.8372    0.8778    1.0633    1.1453
       1.80       0.2720    0.1496    0.0476   -0.2452   -0.4492   -0.6704   -0.6992   -0.5870   -0.4358   -0.2497   -0.0327    0.2109    0.4766    0.7600    1.0565    1.1857    0.9064    1.1462    1.2471
       2.00       0.2800    0.1540    0.0490   -0.2550   -0.4184   -0.6815   -0.9109   -0.8174   -0.6497   -0.4409   -0.1955    0.0817    0.3854    0.7102    1.0508    1.4020    1.0384    1.2386    1.3613
       2.20       0.2880    0.1584    0.0504   -0.2921   -0.4208   -0.6817   -0.9930   -1.0876   -0.9040   -0.6716   -0.3952   -0.0804    0.2665    0.6391    1.0308    1.4349    1.2947    1.3425    1.4905
       2.40       0.2960    0.1628    0.0518   -0.3373   -0.4694   -0.6986   -1.0508   -1.3501   -1.2028   -0.9460   -0.6361   -0.2799    0.1157    0.5431    0.9946    1.4615    1.7448    1.4426    1.6392
       2.60       0.3040    0.1672    0.0532   -0.3924   -0.5654   -0.7590   -1.1209   -1.5169   -1.5495   -1.2671   -0.9216   -0.5205   -0.0718    0.4160    0.9340    1.4730    2.4093    1.6119    1.8149
       2.80       0.3120    0.1716    0.0546   -0.4594   -0.7033   -0.8502   -1.1831   -1.6886   -1.9457   -1.6367   -1.2533   -0.8042   -0.2983    0.2548    0.8450    1.4615    2.7149    1.9083    2.0174
       3.00       0.3200    0.1760    0.0560   -0.5449   -0.8711   -1.0006   -1.2607   -1.8050   -2.3151   -2.0537   -1.6303   -1.1296   -0.5625    0.0602    0.7272    1.4266    2.8699    2.3284    2.2169
       3.50       0.3400    0.1870    0.0595   -0.9326   -1.3694   -1.5245   -1.6576   -2.0258   -2.8094   -3.2705   -2.7187   -2.0734   -1.3396   -0.5313    0.3371    1.2511    3.1520    4.1518    2.9798
       4.00       0.3600    0.1980    0.0630   -1.5699   -1.8330   -2.0130   -2.1213   -2.2712   -2.8312   -3.7461   -3.8340   -3.0255   -2.1296   -1.1496   -0.0998    1.0050    3.3127    5.5856    4.1424
       5.00       0.4000    0.2200    0.0700   -1.7942   -2.1620   -2.4229   -2.5843   -2.6873   -2.8195   -3.3026   -4.1031   -4.7300   -3.5815   -2.3372   -1.0126    0.3765    3.3207    6.1726    7.0079
    </tableData>
  </table>

  <!-- helical tip Mach effects -->
  <table name="CT_MACH" type="internal">
    <tableData>
      0.80   1.00
      0.90   0.95
      1.00   0.85
      1.10   0.75
    </tableData>
  </table>
  <table name="CP_MACH" type="internal">
    <tableData>
      0.80   1.00
      0.90   1.08
      1.00   1.30
      1.10   1.50
    </tableData>
  </table>
</propeller>
